// SBML level 3 version 1

model combined()

  // Compartments:
  compartment default_compartment = 1;
  compartment M1_comp1 = 1;
  compartment unnamed = 1;
  compartment comp1 = 1;

  // Species:
  species Mg_e in M1_comp1 = 0.8/M1_comp1;
  species Mg_f in M1_comp1 = 0.8/M1_comp1;
  species M1_TRPM in M1_comp1 = 1/M1_comp1;
  species ATP in M1_comp1 = 4.420049/M1_comp1;
  species Mg_ATP in M1_comp1 = 17.57597/M1_comp1;
  species $Mg in M1_comp1;
  species Mg_IM in M1_comp1 = 0.1293189/M1_comp1;
  species M1_TRPM_n in M1_comp1 = 1/M1_comp1;
  species $M1_cons in M1_comp1 = 0;
  species $M1_ATP_prod in M1_comp1 = 1;
  species $M1_TRPM_prod in M1_comp1 = 1;
  species $nMg in M1_comp1;
  species $nMg_f in M1_comp1;
  species $IM in M1_comp1 = 1.019974;
  species M1_M7CK in M1_comp1 = 1/M1_comp1;
  species M1_M7CK_n in M1_comp1 = 1/M1_comp1;
  species $M1_deg in M1_comp1 = 0;
  species $M1_H3S10 in M1_comp1 = 1;
  species pH3S10 in M1_comp1 = 1/M1_comp1;
  species $M1_nMg_IM in M1_comp1;
  species $nMg_ATP in M1_comp1;
  species $M1_h3s10_prod in M1_comp1 = 1;
  species deg in unnamed = 0;
  species V165a in unnamed = 1200/unnamed;
  species IFNG in unnamed = 468/unnamed;
  species IFNGR_JAK in unnamed = 17784/unnamed; IFNGR_JAK is "IFNGR/JAK";
  species IFNG_R_JAK in unnamed = 0; IFNG_R_JAK is "IFNG/R/JAK";
  species pIFNG_R_JAK in unnamed = 0; pIFNG_R_JAK is "pIFNG/R/JAK";
  species STAT1 in unnamed = 552129/unnamed;
  species pIFNG_R_JAK_STAT1 in unnamed = 78/unnamed; pIFNG_R_JAK_STAT1 is "pIFNG/R/JAK/STAT1";
  species pSTAT1 in unnamed = 28/unnamed;
  species pSTAT1D in unnamed = 36/unnamed;
  species pSTAT1D_n in unnamed = 58/unnamed;
  species STAT1D_n in unnamed = 36/unnamed;
  species STAT1_n in unnamed = 1557/unnamed;
  species $SOCS1_prod in unnamed = 1;
  species SOCS1 in unnamed = 5425/unnamed;
  species IFNG_R_JAK_SOCS1 in unnamed = 10/unnamed; IFNG_R_JAK_SOCS1 is "IFNG/R/JAK/SOCS1";
  species IFNG_R_lyso in unnamed = 1/unnamed; IFNG_R_lyso is "IFNG/R_lyso";
  species SOCS1_JAK in unnamed = 4/unnamed; SOCS1_JAK is "SOCS1/JAK";
  species IRF9 in unnamed = 1589/unnamed;
  species IRF9_n in unnamed = 15960/unnamed;
  species pSTAT1D_IRF9 in unnamed = 7/unnamed; pSTAT1D_IRF9 is "pSTAT1D/IRF9";
  species pSTAT1D_IRF9_n in unnamed = 87/unnamed; pSTAT1D_IRF9_n is "pSTAT1D/IRF9_n";
  species $CXCL10_prod in unnamed = 1;
  species SOCS3 in unnamed = 2830/unnamed;
  species IFNG_R_JAK_SOCS3 in unnamed = 3/unnamed; IFNG_R_JAK_SOCS3 is "IFNG/R/JAK/SOCS3";
  species SOCS3_JAK in unnamed = 8/unnamed; SOCS3_JAK is "SOCS3/JAK";
  species $SOCS3_prod in unnamed = 1;
  species IL4 in unnamed = 26/unnamed;
  species IL4R_JAK in unnamed = 3068/unnamed; IL4R_JAK is "IL4R/JAK";
  species IL4_R_JAK in unnamed = 0; IL4_R_JAK is "IL4/R/JAK";
  species pIL4_R_JAK in unnamed = 0; pIL4_R_JAK is "pIL4/R/JAK";
  species STAT6 in unnamed = 59952/unnamed;
  species pIL4_R_JAK_STAT6 in unnamed = 0; pIL4_R_JAK_STAT6 is "pIL4/R/JAK/STAT6";
  species pSTAT6 in unnamed = 14/unnamed;
  species pSTAT6D in unnamed = 0;
  species pSTAT6D_n in unnamed = 12/unnamed;
  species STAT6D_n in unnamed = 0;
  species STAT6_n in unnamed = 5/unnamed;
  species IL4_R_JAK_SOCS1_i in unnamed = 0; IL4_R_JAK_SOCS1_i is "IL4/R/JAK/SOCS1_i";
  species IL4_R_lyso in unnamed = 0; IL4_R_lyso is "IL4/R_lyso";
  species IL4_R_JAK_SOCS3_i in unnamed = 0; IL4_R_JAK_SOCS3_i is "IL4/R/JAK/SOCS3_i";
  species PTEN in unnamed = 75355/unnamed;
  species IRF4 in unnamed = 18703/unnamed;
  species $IRF4_prod in unnamed = 1;
  species IL10 in unnamed = 900/unnamed;
  species JAK in unnamed = 99122/unnamed;
  species IFNGR in unnamed = 93/unnamed;
  species IFNG_R in unnamed = 1/unnamed; IFNG_R is "IFNG/R";
  species IL4R in unnamed = 16/unnamed;
  species IL4_R in unnamed = 0; IL4_R is "IL4/R";
  species $IL10_prod in unnamed = 1;
  species $ARG1_prod in unnamed = 1;
  species ARG1 in unnamed = 1450000/unnamed;
  species $IL12_prod in unnamed = 1;
  species $CXCL9_prod in unnamed = 1;
  species $miR3473_prod in unnamed = 1;
  species m3473b in unnamed = 477/unnamed;
  species mPTEN in unnamed = 10/unnamed;
  species m3473b_mPTEN in unnamed = 3/unnamed; m3473b_mPTEN is "m3473b/mPTEN";
  species $IRF1_prod in unnamed = 1;
  species $iNOS_prod in unnamed = 1;
  species iNOS in unnamed = 880/unnamed;
  species m93 in unnamed = 1437/unnamed;
  species HIF1a in unnamed = 1192/unnamed;
  species HIF2a in unnamed = 752/unnamed;
  species $HIF1a_prod in unnamed = 1;
  species $HIF2a_prod in unnamed = 1;
  species $PPARG_prod in unnamed = 1;
  species PPARG in unnamed = 1227/unnamed;
  species aPPARG in unnamed = 873/unnamed;
  species HIF1b_n in unnamed = 14868/unnamed;
  species HIF2a_n in unnamed = 209/unnamed;
  species HIF1a_n in unnamed = 331/unnamed;
  species HIF2a_b_n in unnamed = 52/unnamed; HIF2a_b_n is "HIF2a/b_n";
  species HIF1a_b_n in unnamed = 82/unnamed; HIF1a_b_n is "HIF1a/b_n";
  species IRF1 in unnamed = 997/unnamed;
  species PHD in unnamed = 12376/unnamed;
  species $O2 in unnamed = 120400000;
  species O2_aPHD in unnamed = 1405/unnamed; O2_aPHD is "O2/aPHD";
  species HIF1a_OH in unnamed = 35/unnamed;
  species HIF2a_OH in unnamed = 8/unnamed;
  species TNFa in unnamed = 384/unnamed;
  species CXCL9 in unnamed = 30/unnamed;
  species mIRF9 in unnamed = 5/unnamed;
  species m93_mIRF9 in unnamed = 5/unnamed; m93_mIRF9 is "m93/mIRF9";
  species $IRF9_prod in unnamed = 1;
  species $PTEN_prod in unnamed = 1;
  species $VEGF_prod in unnamed = 1;
  species $IFNG_prod in unnamed = 1;
  species IL12 in unnamed = 151/unnamed;
  species $PHD_prod in unnamed = 1;
  species $miR93_prod in unnamed = 1;
  species $IFNGR_prod in unnamed = 1;
  species $jak_prod in unnamed = 1;
  species aPHD in unnamed = 17680/unnamed;
  species mCXCL10 in unnamed = 2/unnamed;
  species pIL4_R_JAK_i in unnamed = 0; pIL4_R_JAK_i is "pIL4/R/JAK_i";
  species $IL4_prod in unnamed = 1;
  species IL4_R_JAK_SOCS1 in unnamed = 2/unnamed; IL4_R_JAK_SOCS1 is "IL4/R/JAK/SOCS1";
  species IL4_R_JAK_SOCS3 in unnamed = 0; IL4_R_JAK_SOCS3 is "IL4/R/JAK/SOCS3";
  species $TNFa_prod in unnamed = 1;
  species $il4r_prod in unnamed = 1;
  species $IRG1_prod in unnamed = 1;
  species IRG1 in unnamed = 2450/unnamed;
  species Itaconate in unnamed = 65000000/unnamed;
  species $Itaconate_prod in unnamed = 1;
  species $IRF9T in unnamed;
  species $STAT3 in unnamed = 249039/unnamed;
  species pSTAT3 in unnamed = 6/unnamed;
  species pSTAT3D in unnamed = 2/unnamed;
  species pSTAT3D_n in unnamed = 5/unnamed;
  species STAT3D_n in unnamed = 2/unnamed;
  species STAT3_n in unnamed = 81/unnamed;
  species pSTAT1_3 in unnamed = 78/unnamed; pSTAT1_3 is "pSTAT1/3";
  species pSTAT1_3_n in unnamed = 775/unnamed; pSTAT1_3_n is "pSTAT1/3_n";
  species $PI3K in unnamed = 3828/unnamed;
  species pPI3K in unnamed = 173/unnamed;
  species AKT1 in unnamed = 131577/unnamed;
  species AKT2 in unnamed = 43860/unnamed;
  species pAKT1 in unnamed = 18424/unnamed;
  species pAKT2 in unnamed = 6141/unnamed;
  species $IL10R_prod in unnamed = 1;
  species IL10R in unnamed = 4/unnamed;
  species IL10R_JAK in unnamed = 759/unnamed; IL10R_JAK is "IL10R/JAK";
  species IL10_R_JAK in unnamed = 0; IL10_R_JAK is "IL10/R/JAK";
  species pIL10_R_JAK in unnamed = 0; pIL10_R_JAK is "pIL10/R/JAK";
  species pIL10_R_JAK_STAT3 in unnamed = 6/unnamed; pIL10_R_JAK_STAT3 is "pIL10/R/JAK/STAT3";
  species IL10_R_lyso in unnamed = 0; IL10_R_lyso is "IL10/R_lyso";
  species IL10_R_JAK_SOCS1 in unnamed = 1/unnamed; IL10_R_JAK_SOCS1 is "IL10/R/JAK/SOCS1";
  species IL10_R in unnamed = 4/unnamed; IL10_R is "IL10/R";
  species $pAKT_t in unnamed;
  species mIL10 in unnamed = 1/unnamed;
  species $STAT1_prod in unnamed = 1;
  species $miR146b_prod in unnamed = 1;
  species m146b in unnamed = 131/unnamed;
  species pre_m146b in unnamed = 66/unnamed; pre_m146b is "pre-m146b";
  species $mir155_prod in unnamed = 1;
  species pre_m155 in unnamed = 845/unnamed; pre_m155 is "pre-m155";
  species m155 in unnamed = 844/unnamed;
  species $cebpb_prod in unnamed = 1;
  species CEBPB in unnamed = 98868/unnamed;
  species TNFR in unnamed = 1405/unnamed;
  species TNFa_R in unnamed = 8/unnamed; TNFa_R is "TNFa/R";
  species TNFa_R_lyso in unnamed = 0; TNFa_R_lyso is "TNFa/R_lyso";
  species RIP1 in unnamed = 134379/unnamed;
  species aRIP1 in unnamed = 886/unnamed;
  species $rip_prod in unnamed = 1;
  species A20 in unnamed = 3000/unnamed;
  species $tnfr_prod in unnamed = 1;
  species TAK1 in unnamed = 14869/unnamed;
  species pTAK1 in unnamed = 132/unnamed;
  species p38 in unnamed = 675778/unnamed;
  species pp38 in unnamed = 10093/unnamed;
  species pp38_n in unnamed = 14131/unnamed;
  species JNK in unnamed = 14521/unnamed;
  species pJNK in unnamed = 144/unnamed;
  species IKK in unnamed = 100324/unnamed;
  species pIKK in unnamed = 87/unnamed;
  species $ikk_prod in unnamed = 1;
  species pJNK_n in unnamed = 337/unnamed;
  species ERK in unnamed = 2000000/unnamed;
  species pERK in unnamed = 706/unnamed;
  species pERK_n in unnamed = 2470/unnamed;
  species VEGFR1 in unnamed = 5200/unnamed;
  species V165a_R1 in unnamed = 8/unnamed; V165a_R1 is "V165a/R1";
  species pV165a_R1 in unnamed = 3/unnamed; pV165a_R1 is "pV165a/R1";
  species V165_R1_lyso in unnamed = 18/unnamed; V165_R1_lyso is "V165/R1_lyso";
  species V165b in unnamed = 400/unnamed;
  species V165b_R1 in unnamed = 20/unnamed; V165b_R1 is "V165b/R1";
  species pV165a_R1_STAT3 in unnamed = 11/unnamed; pV165a_R1_STAT3 is "pV165a/R1/STAT3";
  species $R1_prod in unnamed = 1;
  species p65 in unnamed = 75892/unnamed;
  species p50 in unnamed = 4/unnamed;
  species $nfkb_prod in unnamed = 1;
  species NFKB in unnamed = 277/unnamed;
  species NFKB_n in unnamed = 931/unnamed;
  species IKB_n in unnamed = 25/unnamed;
  species IKB_NFKB_n in unnamed = 29/unnamed; IKB_NFKB_n is "IKB/NFKB_n";
  species IKB_NFKB in unnamed = 68307/unnamed; IKB_NFKB is "IKB/NFKB";
  species IKB in unnamed = 435/unnamed;
  species $Ikb_prod in unnamed = 1;
  species pIKB in unnamed = 143/unnamed;
  species p50_n in unnamed = 50/unnamed;
  species CREB in unnamed = 75239/unnamed;
  species pCREB in unnamed = 4761/unnamed;
  species $ap1_prod in unnamed = 1;
  species AP1_n in unnamed = 864/unnamed;
  species INT1 in unnamed = 995/unnamed;
  species aINT1 in unnamed = 5/unnamed;
  species $egr2_prod in unnamed = 1;
  species EGR2 in unnamed = 7100/unnamed;
  species $a20_prod in unnamed = 1;
  species INT2 in unnamed = 995/unnamed;
  species aINT2 in unnamed = 5/unnamed;
  species $il1b_prod in unnamed = 1;
  species IL1b in unnamed = 845/unnamed;
  species $il1r_prod in unnamed = 1;
  species IL1R in unnamed = 625/unnamed;
  species IL1b_R in unnamed = 1/unnamed; IL1b_R is "IL1b/R";
  species IRAK4 in unnamed = 199999/unnamed;
  species IL1b_R_lyso in unnamed = 0; IL1b_R_lyso is "IL1b/R_lyso";
  species $irak4_prod in unnamed = 1;
  species TRAF6 in unnamed = 2995/unnamed;
  species IRF5 in unnamed = 146962/unnamed;
  species aIRF5 in unnamed = 3120/unnamed;
  species aTRAF6 in unnamed = 5/unnamed;
  species IL1Ra in unnamed = 11000/unnamed;
  species IL1Ra_R in unnamed = 16/unnamed; IL1Ra_R is "IL1Ra/R";
  species $il1ra_prod in unnamed = 1;
  species pIRAK4 in unnamed = 1/unnamed;
  species GSK3b in unnamed = 87270/unnamed;
  species pGSK3b in unnamed = 52730/unnamed;
  species aLPS in comp1 = 0;
  species LPS in comp1 = 0;
  species _pSTAT3 in default_compartment = 10/default_compartment;
  species _pPI3K in default_compartment = 10/default_compartment;
  species $IL6R_JACK in default_compartment = 1;
  species IL6 in default_compartment = 5.718738/default_compartment;
  species IL6_R_JACK in default_compartment = 3.846369/default_compartment;
  species pIL6_R_JACK in default_compartment = 5.28725/default_compartment;
  species $IL6_prod in default_compartment = 0;
  species IL6_m in default_compartment = 6.283443/default_compartment;
  species $IL8_prod in default_compartment = 1;
  species IL8_m in default_compartment = 1.213831/default_compartment;
  species IL8 in default_compartment = 4.724288/default_compartment;
  species $IL8R in default_compartment = 1;
  species IL8_R in default_compartment = 2.310406/default_compartment;
  species pIL8_R in default_compartment = 6.666584/default_compartment;
  species $RHO in default_compartment = 1;
  species aRHO in default_compartment = 0;

  // Parameters:
  M1_Mg_0 = Mg_f + Mg_ATP + Mg_IM;
  Mg_f_0 = Mg_f;
  M1_Mg_IM_0 = Mg_IM;
  Mg_ATP_0 = Mg_ATP;
  pH3S10_0 = pH3S10;
  M1_TRPM_0 = M1_TRPM;
  M1_TRPM_n_0 = M1_TRPM_n;
  M1_M7CK_n_0 = M1_M7CK_n;
  M1_ATP_0 = ATP;
  k_lps = 1419.632;
  kd_lps = 70095.64;
  IKB_0 = IKB;
  IL1b_0 = IL1b;
  IL10_0 = IL10;
  TNFa_0 = TNFa;
  NFKB_n_0 = NFKB_n;
  k_il6_stat3_a = 33.37389;
  kd_il6_stat3_a = 6751.839;
  o_il6_stat3_a = 0.109963;
  pIL6_R_JACK_0 = pIL6_R_JACK;
  k_il6_pi3k_a = 814.8304;
  kd_il6_pi3k_a = 8185.166;
  o_il6_pi3k_a = 0.347926;
  k_nfkb_il6_p = 3.072004;
  kd_nfkb_il6_p = 66321.69;
  o_nfkb_il6_p = 0.09076516;
  k_ap1_il6_p = 11.39895;
  kd_ap1_il6_p = 84278.16;
  o_ap1_il6_p = 0.5956425;
  AP1_n_0 = AP1_n;
  k_creb_il6_p = 27.56656;
  kd_creb_il6_p = 74668.62;
  o_creb_il6_p = 0.09579109;
  IL6_m_0 = IL6_m;
  ee = 1e-5;
  IL6_0 = IL6;
  _pSTAT3_0 = _pSTAT3;
  _pPI3K_0 = _pPI3K;
  k_nfkb_il8_p = 1.238066;
  kd_nfkb_il8_p = 768.6186;
  o_nfkb_il8_p = 0.8408046;
  k_ap1_il8_p = 1.277438;
  kd_ap1_il8_p = 786.3889;
  o_ap1_il8_p = 0.9967237;
  k_il8_irak_p = 97560.47;
  kd_il8_irak_p = 1003.507;
  o_il8_irak_p = 0.7770775;
  pIL8_R_0 = pIL8_R;
  k_rho_nfkb_a = 17585.93;
  kd_rho_nfkb_a = 57935.09;
  o_rho_nfkb_a = 6.648843e-6;
  k_rho_pi3k_a = 1022.069;
  kd_rho_pi3k_a = 98995.63;
  o_rho_pi3k_a = 0.004795233;
  k_rho_stat3_a = 6393.973;
  kd_rho_stat3_a = 83267.05;
  o_rho_stat3_a = 0.0771983;
  IL8_m_0 = IL8_m;
  IL8_0 = IL8;
  IFNGR_0 = IFNGR;
  IL4R_0 = IL4R;
  IRAK4_0 = IRAK4;
  aTRAF6_0 = aTRAF6;
  kd_mg_ikb_d = 88.948;
  k_h3s10_ikb_p = 29.52;
  kd_h3s10_ikb_p = 1.207;
  o_h3s10_ikb = 1;
  k_h3s10_il8_p = 1;
  kd_h3s10_il8_p = 1;
  o_h3s10_il8 = 0;
  M1_k_m_i = 0.3541188;
  k_atp_p0 = 0.002255125;
  k_atp_pm = 8.491754;
  k_atp_c = 0.5901245;
  M1_k_matp_b = 0.8632245;
  M1_k_matp_ub = 0.4525248;
  M1_k_mim_b = 0.1598112;
  M1_k_mim_ub = 0.9897382;
  M1_k_ntrpm_p = 0.001011131;
  M1_n_ntrpm_p = 2.303172;
  M1_k_ntrpm_t = 0.7410061;
  M1_k_trpm_s = 0.9968438;
  M1_k_m7ck_t1 = 0.9219271;
  M1_k_m7ck_t2 = 0.7127451;
  M1_k_m7ck_deg = 0.9623776;
  M1_k_h3s10_p = 7.035444;
  M1_k_h3s10_d = 0.7221698;
  M1_k_h3s10_a = 0.9589421;
  M1_k_h3s10_da = 0.807474;
  kf1 = 1.6e-7;
  kr1 = 0.01;
  kf2 = 3;
  kr2 = 10;
  kf3 = 0.03;
  kr3 = 3;
  k4 = 2;
  kf5 = 0.1;
  kr5 = 1;
  k6 = 1;
  k7 = 0.03;
  k9 = 0.1;
  kf11 = 0.008;
  kr11 = 0.2;
  k12 = 0.1;
  k13 = 0.03;
  kf14 = 0.00013;
  kr14 = 1;
  k15 = 0.1;
  k17 = 7e-5;
  ka17 = 100000;
  kf18 = 0.004;
  k20 = 82138;
  ka20 = 6000;
  kb20 = 1000000;
  k21 = 1;
  kf22 = 2.6e-6;
  kr22 = 0.13;
  k23 = 0.2;
  kf24 = 0.1;
  kr24 = 10;
  k25 = 8;
  k26 = 0.01;
  kf27 = 0.002;
  k28 = 0.4;
  k31 = 0.05;
  k33 = 0.007;
  k34 = 0.3;
  kf35 = 0.0004;
  k37 = 0.01;
  k38 = 17100;
  ka38 = 30000;
  kb38 = 20000;
  kf39 = 4e-6;
  kr39 = 0.002;
  kr40 = 0.002;
  k44 = 8.74e-8;
  ka44 = 50000;
  kb44 = 20;
  kc44 = 1000;
  kd44 = 31396;
  ke44 = 50000;
  kf44 = 100;
  kg44 = 500;
  k45 = 487.82;
  ka45 = 10000;
  kb45 = 200000;
  kc45 = 5;
  kd45 = 1000;
  k46 = 180.31;
  ka46 = 100000000;
  kb46 = 30000;
  kc46 = 100000;
  kd46 = 2;
  k47 = 1.67e-6;
  k48 = 14.8;
  ka48 = 40000;
  k49 = 2.32;
  kf50 = 0.0001;
  kr50 = 0.06;
  k51 = 0.1;
  k52 = 204.54;
  ka52 = 100;
  k53 = 27.467;
  ka53 = 4000;
  kb53 = 82234;
  kc53 = 100000;
  kd53 = 100000;
  k54 = 192.86;
  ka54 = 13000;
  kb54 = 500;
  k55 = 0.0057644;
  k56 = 16.696;
  ka56 = 200;
  k57 = 1.45e-5;
  kf58 = 0.005;
  kr58 = 0.018;
  kf60 = 5e-7;
  kr60 = 0.03;
  kf62 = 7.14e-9;
  kr62 = 10.8;
  k63 = 1.33e-5;
  k64 = 5e-6;
  k65 = 0.6;
  k66 = 0.1;
  k67 = 1.18;
  k70 = 0.5;
  k71 = 0.32;
  k72 = 856.3;
  ka72 = 6000;
  kb72 = 500;
  kc72 = 10657;
  kd72 = 5000;
  k73 = 14184;
  ka73 = 300.02;
  kb73 = 5;
  kc73 = 1000;
  kd73 = 100000;
  ke73 = 107000000;
  kf73 = 2;
  k74 = 606;
  ka74 = 32600;
  kb74 = 25400;
  k75 = 0.0008;
  k76 = 0.03;
  k79 = 9.9636;
  ka79 = 0.05;
  k80 = 1.22;
  k81 = 0.006;
  k82 = 1;
  k84 = 0.0002;
  k85 = 0.022;
  k86 = 50;
  k87 = 0.0005;
  k88 = 0.003;
  k89 = 0.004;
  k90 = 0.0018;
  k92 = 0.0012;
  k93 = 0.0003;
  kr94 = 0.1;
  kf94 = 0.07;
  k95 = 0.0035;
  k96 = 0.0002;
  k97 = 0.00033;
  k98 = 0.0006;
  k99 = 0.006;
  k100 = 0.05;
  k101 = 0.004;
  kf102 = 0.6;
  kr102 = 0.1;
  k103 = 1;
  k104 = 0.2086;
  k105 = 0.001;
  k106 = 0.5;
  k111 = 0.1;
  k117 = 0.4;
  k118 = 0.0074611;
  ka118 = 2000000;
  kb118 = 5;
  k119 = 2.672;
  ka119 = 500;
  k120 = 6.4e-12;
  k121 = 0.00062;
  k122 = 0.05;
  k123 = 0.005;
  kr124 = 0.01;
  kf125 = 0.1;
  kr125 = 1;
  k126 = 1;
  k127 = 0.3;
  k129 = 1;
  kf131 = 1;
  k133 = 0.1;
  k134 = 0.005;
  k135 = 5.1357;
  ka135 = 83.5;
  kb135 = 76;
  kc135 = 2;
  kd135 = 1000;
  k136 = 0.088;
  k137 = 0.8;
  k138 = 0.00013;
  ka138 = 5000;
  k140 = 0.01;
  k142 = 0.04;
  kf144 = 3e-7;
  kr144 = 0.015;
  kf145 = 4.0078;
  kr145 = 0.1;
  kf146 = 0.001;
  kr146 = 2;
  k147 = 7.5;
  k148 = 0.1;
  k150 = 0.1;
  k155 = 0.006;
  k156 = 0.2;
  k157 = 0.002;
  k158 = 0.0004;
  k159 = 800;
  ka159 = 50;
  k160 = 0.13083;
  ka160 = 30;
  kb160 = 500000;
  k161 = 0.0005;
  k162 = 0.003;
  k163 = 0.001;
  k164 = 1.27e-13;
  ka164 = 20;
  kb164 = 6000;
  k165 = 0.003;
  k166 = 0.001;
  k167 = 0.001;
  k168 = 0.003;
  k169 = 7.13e-9;
  ka169 = 100;
  kb169 = 2000;
  kf170 = 1.7e-6;
  kr170 = 0.021;
  k171 = 0.1;
  k172 = 1;
  k173 = 1;
  k174 = 0.004;
  k175 = 0.001;
  k176 = 200;
  k177 = 0.0005;
  k178 = 5.148;
  ka178 = 100000;
  k179 = 1;
  k180 = 6;
  k181 = 6.2e-6;
  k182 = 1;
  k183 = 70;
  ka183 = 10000;
  k184 = 0.2;
  k185 = 0.7;
  k186 = 1;
  ka186 = 200;
  k187 = 0.2;
  k188 = 0.5;
  k189 = 5e-8;
  k190 = 1;
  k191 = 100;
  k192 = 5.2e-10;
  k193 = 0.3;
  k195 = 4.9739;
  ka195 = 1000000;
  k197 = 0.2;
  k198 = 0.1;
  kf199 = 1e-6;
  kr199 = 0.005;
  kf200 = 1;
  kr200 = 0.5;
  k201 = 2;
  k202 = 0.5;
  k203 = 1;
  k204 = 20;
  kf205 = 1e-5;
  kr205 = 0.05;
  k206 = 1;
  kf207 = 4e-5;
  kr207 = 2;
  k208 = 1;
  k209 = 9.35;
  k210 = 0.0001;
  k211 = 40;
  k212 = 0.1;
  k213 = 0.00046;
  k214 = 0.00035;
  kf215 = 0.001;
  kr215 = 1;
  kf216 = 0.001;
  kr216 = 6e-5;
  k217 = 0.8;
  k219 = 0.1;
  kf220 = 0.1;
  kr220 = 0.8;
  k221 = 0.2;
  k222 = 240;
  ka222 = 10000000;
  k223 = 1;
  k224 = 0.010425;
  ka224 = 5000;
  k225 = 0.1;
  k226 = 0.1;
  k227 = 1e-7;
  k228 = 3.9e-7;
  k229 = 0.012;
  k230 = 0.048045;
  ka230 = 5000;
  k231 = 0.00038;
  k232 = 0.002;
  k233 = 292.31;
  ka233 = 300;
  k234 = 0.0015;
  k235 = 0.01;
  k236 = 0.00024;
  k237 = 2.44e-8;
  k238 = 0.00075;
  k239 = 5.2492;
  ka239 = 500000000;
  kb239 = 5;
  kc239 = 1000;
  k240 = 5.485;
  ka240 = 100;
  k241 = 0.0008;
  kf242 = 1.75e-7;
  kr242 = 0.1;
  k243 = 0.02;
  k244 = 1;
  k245 = 0.1;
  k246 = 174;
  ka246 = 1000;
  k247 = 0.00035;
  k248 = 3.18e-7;
  ka248 = 300;
  kb248 = 100000;
  kc248 = 20;
  k249 = 1;
  k251 = 30841;
  ka251 = 1590000;
  kb251 = 1000;
  kc251 = 100;
  k252 = 0.0001;
  k253 = 0.002;
  k254 = 0.0040925;
  ka254 = 5000;
  kb254 = 20000;
  k255 = 1e-5;
  k256 = 1;
  k257 = 1.04e-10;
  k258 = 0.1;
  k_pstat3_d = 0.1;
  k_pstat3_b = 0.1;
  k_pstat3_ub = 0.1;
  k_ppi3k_d = 0.1;
  K_ppi3k_a = 0.1;
  K_ppi3k_da = 0.1;
  k_il6r_b = 0.001829317;
  k_il6r_ub = 0.5354093;
  k_il6r_a = 0.003700948;
  k_il6r_da = 0.1275392;
  k_il6_p = 0.1372805;
  k_il6m_il6 = 0.1625729;
  k_il6_d = 0.693/(1*60);
  k_il6m_d = 0.693/(1*60);
  k_il8_p = 0.02439747;
  k_il8m_il8 = 0.145967;
  k_il8_d = 0.693/(4*60);
  k_il8m_d = 0.693/(10*60);
  k_il8r_b = 0.6167265;
  k_il8r_ub = 0.1934742;
  k_il8r_a = 0.01454718;
  k_il8r_da = 0.4677501;
  k_rho_a = 1.116795;
  kd_rho_a = 2456.098;
  k_rho_da = 0.6171084;
  M1_Mg_e_0 = Mg_e;
  M1_IM_prod = 1;
  M1_n_h3s10_a = 0.7377167;
  k_lps_a = 0.5734581;
  k_lpsa_d = 0.006555186;
  k_lps_d = 0.213982;
  LPS_0 = 0;
  aRHO_0 = aRHO;
  pCREB_0 = pCREB;

  // Assignment rules:
  Mg := Mg_f + Mg_ATP + Mg_IM;
  nMg := Mg/M1_Mg_0;
  nMg_f := Mg_f/Mg_f_0;
  M1_nMg_IM := Mg_IM/M1_Mg_IM_0;
  nMg_ATP := Mg_ATP/Mg_ATP_0;
  IRF9T := IRF9 + IRF9_n + pSTAT1D_IRF9 + pSTAT1D_IRF9_n;
  pAKT_t := pAKT1 + pAKT2;
  npH3S10 := pH3S10/pH3S10_0;
  nTRPM := M1_TRPM/M1_TRPM_0;
  nTRPM_n := M1_TRPM_n/M1_TRPM_n_0;
  nM7CK_n := M1_M7CK_n/M1_M7CK_n_0;
  nATP := ATP/M1_ATP_0;
  M1_F_trpm_i := 1;
  F_lps := 1 + k_lps*aLPS/(aLPS + kd_lps);
  nIKB := IKB/IKB_0;
  nIL1b := IL1b/IL1b_0;
  nIL10 := IL10/IL10_0;
  nTNFa := TNFa/TNFa_0;
  nNFKB_n := NFKB_n/NFKB_n_0;
  F_il6_stat3_a := 1 + k_il6_stat3_a*diff_il6/(diff_il6 + kd_il6_stat3_a) - o_il6_stat3_a;
  diff_il6 := (pIL6_R_JACK - pIL6_R_JACK_0)*(pIL6_R_JACK - pIL6_R_JACK_0);
  F_il6_pi3k_a := 1 + k_il6_pi3k_a*diff_il6/(diff_il6 + kd_il6_pi3k_a) - o_il6_pi3k_a;
  F_nfkb_il6_p := 1 + k_nfkb_il6_p*diff_nfkb_s/(diff_nfkb_s + kd_nfkb_il6_p) - o_nfkb_il6_p;
  diff_nfkb_s := (NFKB_n - NFKB_n_0)*(NFKB_n > NFKB_n_0);
  F_ap1_il6_p := 1 + k_ap1_il6_p*diff_ap1_s/(diff_ap1_s + kd_ap1_il6_p) - o_ap1_il6_p;
  diff_ap1_s := (AP1_n - AP1_n_0)*(AP1_n > AP1_n_0);
  F_creb_il6_p := 1 + k_creb_il6_p*pCREB/(pCREB + kd_creb_il6_p) - o_creb_il6_p;
  nIL6_m := IL6_m/(IL6_m_0 + ee);
  nIL6 := (IL6 + ee)/(IL6_0 + ee);
  npSTAT3 := _pSTAT3/(_pSTAT3_0 + ee);
  npPI3K := _pPI3K/(_pPI3K_0 + ee);
  F_nfkb_il8_p := 1 + k_nfkb_il8_p*NFKB_n/(NFKB_n + kd_nfkb_il8_p) - o_nfkb_il8_p;
  F_ap1_il8_p := 1 + k_ap1_il8_p*AP1_n/(AP1_n + kd_ap1_il8_p) - o_ap1_il8_p;
  F_il8_irak_p := 1 + k_il8_irak_p*diff_il8_s/(diff_il8_s + kd_il8_irak_p) - o_il8_irak_p;
  diff_il8_s := (pIL8_R - pIL8_R_0)*(pIL8_R > pIL8_R_0);
  F_rho_nfkb_a := 1 + k_rho_nfkb_a*aRHO/(aRHO + kd_rho_nfkb_a) - o_rho_nfkb_a;
  F_rho_pi3k_a := 1 + k_rho_pi3k_a*aRHO/(aRHO + kd_rho_pi3k_a) - o_rho_pi3k_a;
  F_rho_stat3_a := 1 + k_rho_stat3_a*aRHO/(aRHO + kd_rho_stat3_a) - o_rho_stat3_a;
  nIL8_m := (IL8_m + ee)/(IL8_m_0 + ee);
  nIL8 := (IL8 + ee)/(IL8_0 + ee);
  nIFNGR := (IFNGR + ee)/IFNGR_0;
  nIL4R := (IL4R + ee)/IL4R_0;
  nIRAK4 := IRAK4/IRAK4_0;
  naTRAF6 := (aTRAF6 + ee)/aTRAF6_0;
  npIL8_R := (pIL8_R + ee)/(pIL8_R_0 + ee);
  F_mg_ikb_d := kd_mg_ikb_d/(Mg_f - Mg_f_0 + kd_mg_ikb_d);
  F_h3s10_ikb := 1 + k_h3s10_ikb_p*(pH3S10 - pH3S10_0)/(pH3S10 - pH3S10_0 + kd_h3s10_ikb_p) - o_h3s10_ikb;
  F_p3s10_il8_p := 1 + k_h3s10_il8_p*(pH3S10 - pH3S10_0)/(pH3S10 - pH3S10_0 + kd_h3s10_il8_p) - o_h3s10_il8;

  // Reactions:
  M1_M1_v1: Mg_e => Mg_f; M1_k_m_i*(Mg_e - Mg_f)*(Mg_e > Mg_f);
  M1_M1_v2: $M1_ATP_prod + Mg_f => ATP + Mg_f; k_atp_p0 + k_atp_pm*Mg_f;
  M1_M1_v3: ATP => $M1_cons; k_atp_c*ATP;
  M1_M1_v4: Mg_f + ATP -> Mg_ATP; M1_k_matp_b*Mg_f*(Mg_f > 0)*ATP*(ATP > 0) - M1_k_matp_ub*Mg_ATP*(Mg_ATP > 0);
  M1_M1_v5: Mg_f + $IM -> Mg_IM; M1_k_mim_b*Mg_f*(Mg_f > 0)*IM*(IM > 0) - M1_k_mim_ub*Mg_IM*(Mg_IM > 0);
  M1_M1_v6: $M1_TRPM_prod + Mg_ATP => M1_TRPM_n + Mg_ATP; M1_k_ntrpm_p*M1_TRPM_prod*Mg_ATP^M1_n_ntrpm_p;
  M1_M1_v7: M1_TRPM_n => M1_TRPM; M1_k_ntrpm_t*M1_TRPM_n;
  M1_M1_v8: M1_TRPM => M1_M7CK; M1_k_trpm_s*M1_TRPM;
  M1_M1_v9: M1_M7CK -> M1_M7CK_n; M1_k_m7ck_t1*M1_M7CK*(M1_M7CK > 0) - M1_k_m7ck_t2*M1_M7CK_n*(M1_M7CK_n > 0);
  M1_M1_v10: M1_M7CK => $M1_deg; M1_k_m7ck_deg*M1_M7CK*(M1_M7CK > 0);
  M1_M1_v11: $M1_h3s10_prod -> $M1_H3S10; M1_k_h3s10_p;
  M1_M1_v12: $M1_H3S10 -> $M1_deg; M1_k_h3s10_d*M1_H3S10;
  M1_M1_v13: $M1_H3S10 + M1_M7CK_n -> pH3S10 + M1_M7CK_n; M1_k_h3s10_a*M1_H3S10*M1_M7CK_n*(M1_H3S10 > 0) - M1_k_h3s10_da*pH3S10*(pH3S10 > 0);
  v1: IFNG + IFNGR_JAK -> IFNG_R_JAK; kf1*IFNG*IFNGR_JAK - kr1*IFNG_R_JAK;
  v2: IFNG_R_JAK -> pIFNG_R_JAK; kf2*IFNG_R_JAK - kr2*pIFNG_R_JAK;
  v3: STAT1 + pIFNG_R_JAK -> pIFNG_R_JAK_STAT1; kf3*STAT1*pIFNG_R_JAK - kr3*pIFNG_R_JAK_STAT1;
  v4: pIFNG_R_JAK_STAT1 => pSTAT1 + pIFNG_R_JAK; k4*pIFNG_R_JAK_STAT1;
  v5: 2 pSTAT1 -> pSTAT1D; kf5*pSTAT1^2 - kr5*pSTAT1D;
  v6: pSTAT1D => pSTAT1D_n; k6*pSTAT1D;
  v10: pSTAT1D_n => STAT1D_n; k7*pSTAT1D_n;
  v8: STAT1D_n => 2 STAT1_n; kr5*STAT1D_n;
  v9: STAT1_n => STAT1; k9*STAT1_n;
  v7: pSTAT1 => STAT1; k7*pSTAT1;
  v11: SOCS1 + IFNG_R_JAK -> IFNG_R_JAK_SOCS1; kf11*SOCS1*IFNG_R_JAK - kr11*IFNG_R_JAK_SOCS1;
  v12: pIFNG_R_JAK => IFNG_R_lyso + JAK; k12*pIFNG_R_JAK;
  v13: IFNG_R_JAK_SOCS1 => SOCS1_JAK + IFNG_R; k13*IFNG_R_JAK_SOCS1;
  v14: pSTAT1D + IRF9 -> pSTAT1D_IRF9; kf14*pSTAT1D*IRF9 - kr14*pSTAT1D_IRF9;
  v15: pSTAT1D_IRF9 => pSTAT1D_IRF9_n; k15*pSTAT1D_IRF9;
  v16: pSTAT1D_n + IRF9_n -> pSTAT1D_IRF9_n; kf14*pSTAT1D_n*IRF9_n - kr14*pSTAT1D_IRF9_n;
  v17: pSTAT1D_IRF9_n + $CXCL10_prod + NFKB_n => pSTAT1D_IRF9_n + mCXCL10 + NFKB_n; k17*pSTAT1D_IRF9_n^2*(0.004 + NFKB_n/(NFKB_n + ka17))*CXCL10_prod;
  v18: SOCS3 + IFNG_R_JAK -> IFNG_R_JAK_SOCS3; kf18*SOCS3*IFNG_R_JAK - kr11*IFNG_R_JAK_SOCS3;
  v19: IFNG_R_JAK_SOCS3 => SOCS3_JAK + IFNG_R; k13*IFNG_R_JAK_SOCS3;
  v20: $SOCS3_prod + pSTAT3D_n + AP1_n => SOCS3 + pSTAT3D_n + AP1_n; k20*(pSTAT3D_n/(pSTAT3D_n + ka20) + AP1_n/(AP1_n + kb20))*SOCS3_prod;
  v21: IFNG_R_lyso => deg; k21*IFNG_R_lyso;
  v22: IL4 + IL4R_JAK -> IL4_R_JAK; kf22*IL4*IL4R_JAK - kr22*IL4_R_JAK;
  v23: pIL4_R_JAK => pIL4_R_JAK_i; k23*pIL4_R_JAK;
  v24: STAT6 + pIL4_R_JAK_i -> pIL4_R_JAK_STAT6; kf24*STAT6*pIL4_R_JAK_i - kr24*pIL4_R_JAK_STAT6;
  v25: pIL4_R_JAK_STAT6 => pSTAT6 + pIL4_R_JAK_i; k25*pIL4_R_JAK_STAT6;
  v26: pSTAT6 => STAT6; k26*pSTAT6;
  v27: 2 pSTAT6 -> pSTAT6D; kf27*pSTAT6^2 - kr5*pSTAT6D;
  v28: pSTAT6D => pSTAT6D_n; k28*pSTAT6D;
  v29: pSTAT6D_n => STAT6D_n; k26*pSTAT6D_n;
  v30: STAT6D_n => 2 STAT6_n; kr5*STAT6D_n;
  v31: STAT6_n => STAT6; k31*STAT6_n;
  v32: SOCS1 + pIL4_R_JAK_i -> IL4_R_JAK_SOCS1_i; kf11*SOCS1*pIL4_R_JAK_i - kr11*IL4_R_JAK_SOCS1_i;
  v33: IL4R => deg; k33*IL4R;
  v34: IL4_R_lyso => deg; k34*IL4_R_lyso;
  v35: SOCS3 + pIL4_R_JAK_i -> IL4_R_JAK_SOCS3_i; kf35*SOCS3*pIL4_R_JAK_i - kr11*IL4_R_JAK_SOCS3_i;
  v36: IL4_R_JAK_SOCS3_i => SOCS3_JAK + IL4_R; k13*IL4_R_JAK_SOCS3_i;
  v37: SOCS3_JAK => deg + SOCS3; k37*SOCS3_JAK;
  v38: $IRF4_prod + pSTAT6D_n + $pAKT_t => IRF4 + pSTAT6D_n + $pAKT_t; k38*pSTAT6D_n/(pSTAT6D_n + ka38)*pAKT_t/(pAKT_t + kb38)*IRF4_prod;
  v39: IFNGR + JAK -> IFNGR_JAK; kf39*IFNGR*JAK - kr39*IFNGR_JAK;
  v40: IL4R + JAK -> IL4R_JAK; kf39*IL4R*JAK - kr40*IL4R_JAK;
  v41: IL4_R_JAK_SOCS1_i => IL4_R + SOCS1_JAK; k13*IL4_R_JAK_SOCS1_i;
  v42: JAK + IFNG_R -> IFNG_R_JAK; kf39*JAK*IFNG_R - kr39*IFNG_R_JAK;
  v43: IL4_R + JAK -> pIL4_R_JAK_i; kf39*IL4_R*JAK - kr40*pIL4_R_JAK_i;
  v44: $IL10_prod + $IRF9T + pSTAT3D_n + p50 + AP1_n + pCREB + CEBPB + pSTAT6D_n + HIF1a_b_n + $pAKT_t + pSTAT1D_n => $IRF9T + pSTAT3D_n + mIL10 + p50 + AP1_n + pCREB + CEBPB + pSTAT6D_n + HIF1a_b_n + $pAKT_t + pSTAT1D_n; k44*((AP1_n + pCREB*0.2 + CEBPB*0.01)/(AP1_n + pCREB*0.2 + CEBPB*0.01 + ka44))*pSTAT3D_n/(pSTAT3D_n + kb44)*(IRF9T + 15000)*(0.5 + pSTAT6D_n/(pSTAT6D_n + kc44))*(HIF1a_b_n^2 + kd44)*(pAKT_t/(pAKT_t + ke44))*IL10_prod*(1 - pSTAT1D_n/(pSTAT1D_n + kf44))*(0.01 + p50/(p50 + kg44));
  v45: pSTAT3D_n + pSTAT6D_n + $ARG1_prod + HIF1a_b_n + HIF2a_b_n + IRF4 + TNFa_R + CEBPB => ARG1 + HIF2a_b_n + pSTAT6D_n + HIF1a_b_n + IRF4 + TNFa_R + CEBPB + pSTAT3D_n; k45*pSTAT6D_n*CEBPB*0.001/(pSTAT6D_n*CEBPB*0.001 + ka45)*(HIF1a_b_n + HIF2a_b_n)^2*(IRF4/(IRF4 + kb45))*(1.1 - TNFa_R/(TNFa_R + kc45))*ARG1_prod*(0.02 + pSTAT3D_n/(pSTAT3D_n + kd45));
  v46: $IL12_prod + IRF1 + aIRF5 + NFKB_n + CEBPB + AP1_n + pSTAT3D_n => IRF1 + IL12 + aIRF5 + NFKB_n + CEBPB + AP1_n + pSTAT3D_n; k46*(IRF1^2/(IRF1^2 + ka46) + 0.01)*IL12_prod*(0.2 + aIRF5/(aIRF5 + kb46))*(0.1 + NFKB_n*CEBPB*AP1_n*1e-7/(NFKB_n*CEBPB*AP1_n*1e-7 + kc46))*(1 - pSTAT3D_n/(pSTAT3D_n + kd46));
  v47: pSTAT1D_n + $CXCL9_prod => pSTAT1D_n + CXCL9; k47*pSTAT1D_n^2*CXCL9_prod;
  v48: $miR3473_prod + IRF1 => m3473b + IRF1; k48*(1 - IRF1^2/(IRF1^2 + ka48))*miR3473_prod;
  v49: mPTEN => PTEN + mPTEN; k49*mPTEN;
  v50: mPTEN + m3473b -> m3473b_mPTEN; kf50*mPTEN*m3473b - kr50*m3473b_mPTEN;
  v51: m3473b_mPTEN => m3473b + deg; k51*m3473b_mPTEN;
  v52: $IRF1_prod + pSTAT1D_n + pSTAT6D_n + pSTAT1D_IRF9_n => IRF1 + pSTAT1D_n + pSTAT6D_n + pSTAT1D_IRF9_n; k52*((pSTAT1D_n + pSTAT1D_IRF9_n + 1)/(pSTAT6D_n + 1))/((pSTAT1D_n + pSTAT1D_IRF9_n + 1)/(pSTAT6D_n + 1) + ka52)*IRF1_prod;
  v53: $iNOS_prod + HIF1a_b_n + IRF1 + $IRF9T + CEBPB + NFKB_n => HIF1a_b_n + IRF1 + iNOS + $IRF9T + CEBPB + NFKB_n; iNOS_prod*k53*(0.01 + HIF1a_b_n/(HIF1a_b_n + ka53))*(IRF1/(IRF1 + kb53))*(IRF9T + 15000)*(0.02 + NFKB_n/(NFKB_n + kc53))*(0.1 + CEBPB/(CEBPB + kd53));
  v54: $HIF1a_prod + m93 + NFKB_n => HIF1a + m93 + NFKB_n; k54*(0.1 + NFKB_n/(NFKB_n + ka54))*(1.4 - m93/(m93 + kb54))*HIF1a_prod;
  v55: $HIF2a_prod + aPPARG => HIF2a + aPPARG; HIF2a_prod*k55*aPPARG;
  v56: $PPARG_prod + pSTAT6D_n => PPARG + pSTAT6D_n; k56*(0.07 + pSTAT6D_n/(pSTAT6D_n + ka56))*PPARG_prod;
  v57: PPARG + $pAKT_t => aPPARG + $pAKT_t; k57*PPARG*pAKT_t;
  v58: HIF2a -> HIF2a_n; kf58*HIF2a - kr58*HIF2a_n;
  v59: HIF1a -> HIF1a_n; kf58*HIF1a - kr58*HIF1a_n;
  v60: HIF2a_n + HIF1b_n -> HIF2a_b_n; kf60*HIF2a_n*HIF1b_n - kr60*HIF2a_b_n;
  v61: HIF1a_n + HIF1b_n -> HIF1a_b_n; kf60*HIF1a_n*HIF1b_n - kr60*HIF1a_b_n;
  v62: $O2 + aPHD -> O2_aPHD; kf62*O2*aPHD - kr62*O2_aPHD;
  v63: O2_aPHD + HIF1a => HIF1a_OH + aPHD; k63*O2_aPHD*HIF1a;
  v64: HIF2a + O2_aPHD => HIF2a_OH + aPHD; k64*HIF2a*O2_aPHD;
  v65: HIF1a_OH => deg; k65*HIF1a_OH;
  v66: SOCS1_JAK => SOCS1 + deg; k66*SOCS1_JAK;
  v67: mIRF9 => IRF9 + mIRF9; k67*mIRF9;
  v68: m93 + mIRF9 -> m93_mIRF9; kf50*m93*mIRF9 - kr50*m93_mIRF9;
  v69: m93_mIRF9 => m93 + deg; k51*m93_mIRF9;
  v70: $IRF9_prod => mIRF9; k70*IRF9_prod;
  v71: $PTEN_prod => mPTEN; k71*PTEN_prod;
  v72: $VEGF_prod + m93 + HIF1a_b_n + HIF2a_b_n + AP1_n + pCREB => V165a + m93 + HIF1a_b_n + HIF2a_b_n + AP1_n + pCREB; VEGF_prod*k72*(0.1 + HIF1a_b_n*HIF2a_b_n/(HIF1a_b_n*HIF2a_b_n + ka72))*(1.1 - m93/(m93 + kb72))*(0.01 + AP1_n/(AP1_n + kc72))*(pCREB/(pCREB + kd72));
  v73: $IFNG_prod + HIF1a_b_n + pSTAT6D_n + HIF2a_b_n + IL12 + NFKB_n + pCREB + AP1_n + pSTAT3D_n => IFNG + HIF1a_b_n + pSTAT6D_n + HIF2a_b_n + IL12 + NFKB_n + pCREB + AP1_n + pSTAT3D_n; k73*(0.01 + (HIF1a_b_n + HIF2a_b_n)/(HIF1a_b_n + HIF2a_b_n + ka73))*(1 - pSTAT6D_n/(pSTAT6D_n + kb73))*IFNG_prod*(0.1 + IL12/(IL12 + kc73))*(0.1 + NFKB_n/(NFKB_n + kd73))*(0.1 + pCREB*AP1_n/(pCREB*AP1_n + ke73))*(1 - pSTAT3D_n/(pSTAT3D_n + kf73));
  v74: $PHD_prod + HIF1a_b_n + HIF2a_b_n => HIF2a_b_n + HIF1a_b_n + PHD; k74*(HIF1a_b_n^2/(HIF1a_b_n^2 + ka74)*HIF2a_b_n^2/(HIF2a_b_n^2 + kb74))*PHD_prod;
  v75: PHD => deg; k75*PHD;
  v76: HIF1a_OH => HIF1a; k76*HIF1a_OH;
  v77: HIF2a_OH => HIF2a; k76*HIF2a_OH;
  v78: HIF2a_OH => deg; k65*HIF2a_OH;
  v79: $miR93_prod + TNFa_R + pIFNG_R_JAK + IL1b_R => m93 + TNFa_R + pIFNG_R_JAK + IL1b_R; k79*(1 - TNFa_R*IL1b_R*pIFNG_R_JAK^1/(TNFa_R*IL1b_R*pIFNG_R_JAK^1 + ka79))*miR93_prod;
  v80: $IFNGR_prod => IFNGR; k80*IFNGR_prod;
  v81: IFNGR => deg; k81*IFNGR;
  v82: IFNG_R_lyso => deg + IFNGR; k82*IFNG_R_lyso;
  v83: IL4_R_lyso => deg + IL4R; k82*IL4_R_lyso;
  v84: IRF4 => deg; k84*IRF4;
  v85: IRF1 => deg; k85*IRF1;
  v86: $jak_prod => JAK; k86*jak_prod;
  v87: JAK => deg; k87*JAK;
  v88: mIRF9 => deg; k88*mIRF9;
  v89: IRF9 => deg; k89*IRF9;
  v90: m93 => deg; k90*m93;
  v91: mPTEN => deg; k88*mPTEN;
  v92: m3473b => deg; k92*m3473b;
  v93: PTEN => deg; k93*PTEN;
  v94: PHD -> aPHD; kr94*PHD - kf94*aPHD;
  v95: mCXCL10 => deg; k95*mCXCL10;
  v96: CXCL9 => deg; k96*CXCL9;
  v97: IL12 => deg; k97*IL12;
  v98: ARG1 => deg; k98*ARG1;
  v99: iNOS => deg; k99*iNOS;
  v100: SOCS3 => deg; k100*SOCS3;
  v101: SOCS1 => deg; k101*SOCS1;
  v102: IL4_R_JAK -> pIL4_R_JAK; kf102*IL4_R_JAK - kr102*pIL4_R_JAK;
  v103: pIL4_R_JAK_i => JAK + IL4_R_lyso; k103*pIL4_R_JAK_i;
  v104: $IL4_prod => IL4; k104*IL4_prod;
  v105: PPARG => deg; k105*PPARG;
  v106: aPPARG => PPARG; k106*aPPARG;
  v107: IL4_R_JAK_SOCS1_i => IL4_R_lyso + SOCS1 + JAK; k103*IL4_R_JAK_SOCS1_i;
  v108: IL4_R => IL4_R_lyso; k103*IL4_R;
  v109: IL4_R_JAK_SOCS3_i => IL4_R_lyso + JAK + SOCS3; k103*IL4_R_JAK_SOCS3_i;
  v110: IL4_R_JAK + SOCS1 -> IL4_R_JAK_SOCS1; kf11*IL4_R_JAK*SOCS1 - kr11*IL4_R_JAK_SOCS1;
  v111: IL4_R_JAK_SOCS1 => JAK + IL4_R_lyso + SOCS1; k111*IL4_R_JAK_SOCS1;
  v112: IL4_R_JAK + SOCS3 -> IL4_R_JAK_SOCS3; kf35*IL4_R_JAK*SOCS3 - kr11*IL4_R_JAK_SOCS3;
  v113: IL4_R_JAK_SOCS3 => SOCS3 + IL4_R_lyso + JAK; k111*IL4_R_JAK_SOCS3;
  v114: aPPARG => deg; k105*aPPARG;
  v115: IFNG_R_JAK_SOCS3 => IFNG_R_lyso + JAK + SOCS3; k12*IFNG_R_JAK_SOCS3;
  v116: IFNG_R_JAK_SOCS1 => IFNG_R_lyso + JAK + SOCS1; k12*IFNG_R_JAK_SOCS1;
  v117: pSTAT1D_IRF9_n => IRF9_n + STAT1D_n; k117*pSTAT1D_IRF9_n;
  v118: $TNFa_prod + IRF1 + $IRF9T + AP1_n + NFKB_n + CEBPB + aIRF5 + pSTAT3D_n => TNFa + IRF1 + $IRF9T + AP1_n + NFKB_n + CEBPB + aIRF5 + pSTAT3D_n; k118*(0.1 + IRF1^2/(IRF1^2 + ka118))*(15000 + IRF9T)*TNFa_prod*(NFKB_n*7*(aIRF5/(aIRF5 + 5000))^2 + AP1_n*0.25 + CEBPB*0.0016 - NFKB_n*CEBPB*8.5e-8)/(NFKB_n*7*(aIRF5/(aIRF5 + 5000))^2 + AP1_n*0.25 + CEBPB*0.0016 - NFKB_n*CEBPB*8.5e-8 + 100000)*(1.1 - pSTAT3D_n/(pSTAT3D_n + kb118));
  v119: $il4r_prod + pSTAT3D_n => IL4R + pSTAT3D_n; k119*il4r_prod*(0.05 + pSTAT3D_n/(pSTAT3D_n + ka119));
  v120: $IRG1_prod + IRF1 + IRF9_n + pSTAT1D_IRF9_n => IRG1 + IRF1 + IRF9_n + pSTAT1D_IRF9_n; k120*IRF1*(IRF9_n + pSTAT1D_IRF9_n)^2*IRG1_prod;
  v121: IRG1 => deg; k121*IRG1;
  v122: $Itaconate_prod + IRG1 => Itaconate + IRG1; k122*IRG1^2*Itaconate_prod;
  v123: Itaconate => deg; k123*Itaconate;
  v124: IRF9 -> IRF9_n; k15*IRF9 - kr124*IRF9_n;
  v125: 2 pSTAT3 -> pSTAT3D; kf125*pSTAT3^2 - kr125*pSTAT3D;
  v126: pSTAT3D => pSTAT3D_n; k126*pSTAT3D;
  v130: pSTAT3D_n => STAT3D_n; k127*pSTAT3D_n;
  v128: STAT3D_n => 2 STAT3_n; kr125*STAT3D_n;
  v129: STAT3_n => $STAT3; k129*STAT3_n;
  v127: pSTAT3 => $STAT3; k127*pSTAT3;
  v131: pSTAT1 + pSTAT3 -> pSTAT1_3; kf131*pSTAT1*pSTAT3 - kr5*pSTAT1_3;
  v132: pSTAT1_3 => pSTAT1_3_n; k126*pSTAT1_3;
  v133: pSTAT1_3_n => STAT3_n + STAT1_n; k133*pSTAT1_3_n;
  v134: pIFNG_R_JAK + $STAT3 => pSTAT3 + pIFNG_R_JAK; k134*pIFNG_R_JAK*STAT3;
  v135: pSTAT1D_n + pSTAT6D_n + pSTAT3D_n + $SOCS1_prod + AP1_n => pSTAT1D_n + pSTAT6D_n + pSTAT3D_n + SOCS1 + AP1_n; k135*(0.1 + pSTAT1D_n/ka135 + pSTAT6D_n/kb135 + pSTAT3D_n/kc135 + (AP1_n/kd135)^2)*SOCS1_prod;
  v136: $PI3K + pIL4_R_JAK + pIL10_R_JAK + pV165a_R1 + IL1b_R + IRAK4 + pIRAK4 => pPI3K + pIL4_R_JAK + pIL10_R_JAK + pV165a_R1 + IL1b_R + IRAK4 + pIRAK4; k136*PI3K*(pIL4_R_JAK + pIL10_R_JAK + pV165a_R1*0.033 + IL1b_R*(IRAK4 + pIRAK4)*3e-7 + 0.01);
  v137: pPI3K => $PI3K; k137*pPI3K;
  v138: AKT1 + pPI3K + PTEN => pAKT1 + PTEN + pPI3K; k138*AKT1*pPI3K*(1 - PTEN/(PTEN + ka138));
  v139: AKT2 + pPI3K + PTEN => pAKT2 + pPI3K + PTEN; k138*AKT2*pPI3K*(1 - PTEN/(PTEN + ka138));
  v140: pAKT1 => AKT1; k140*pAKT1;
  v141: pAKT2 => AKT2; k140*pAKT2;
  v142: $IL10R_prod => IL10R; k142*IL10R_prod;
  v143: IL10R + JAK -> IL10R_JAK; kf39*IL10R*JAK - kr40*IL10R_JAK;
  v144: IL10R_JAK + IL10 -> IL10_R_JAK; kf144*IL10R_JAK*IL10 - kr144*IL10_R_JAK;
  v145: IL10_R_JAK -> pIL10_R_JAK; kf145*IL10_R_JAK - kr145*pIL10_R_JAK;
  v146: pIL10_R_JAK + $STAT3 -> pIL10_R_JAK_STAT3; kf146*pIL10_R_JAK*STAT3 - kr146*pIL10_R_JAK_STAT3;
  v147: pIL10_R_JAK_STAT3 => pSTAT3 + pIL10_R_JAK; k147*pIL10_R_JAK_STAT3;
  v148: pIL10_R_JAK => JAK + IL10_R_lyso; k148*pIL10_R_JAK;
  v149: IL10_R_lyso => deg + IL10R; k82*IL10_R_lyso;
  v150: IL10_R_lyso => deg; k150*IL10_R_lyso;
  v151: IL10_R_JAK + SOCS1 -> IL10_R_JAK_SOCS1; kf11*IL10_R_JAK*SOCS1 - kr11*IL10_R_JAK_SOCS1;
  v152: IL10_R_JAK_SOCS1 => IL10_R_lyso + SOCS1 + JAK; k148*IL10_R_JAK_SOCS1;
  v153: IL10_R_JAK_SOCS1 => SOCS1_JAK + IL10_R; k13*IL10_R_JAK_SOCS1;
  v154: IL10_R + JAK -> IL10R_JAK; kf39*IL10_R*JAK - kr40*IL10R_JAK;
  v155: IL10R => deg; k155*IL10R;
  v156: mIL10 => IL10 + mIL10; k156*mIL10;
  v157: mIL10 => deg; k157*mIL10;
  v158: STAT1 => deg; k158*STAT1;
  v159: $STAT1_prod + m146b => STAT1 + m146b; k159*STAT1_prod*(1 - m146b/(m146b + ka159));
  v160: $miR146b_prod + pSTAT6D_n + pSTAT3D_n + CEBPB => pSTAT6D_n + pSTAT3D_n + pre_m146b + CEBPB; k160*miR146b_prod*(41.5*pSTAT6D_n/(pSTAT6D_n + ka160) + pSTAT3D_n*0.2)*(CEBPB/(CEBPB + kb160));
  v161: m146b => deg; k161*m146b;
  v162: pre_m146b => deg; k162*pre_m146b;
  v163: pre_m146b => m146b; k163*pre_m146b;
  v164: $mir155_prod + pSTAT3D_n + NFKB_n + AP1_n + pAKT2 + pAKT1 => pre_m155 + pSTAT3D_n + NFKB_n + AP1_n + pAKT2 + pAKT1; k164*mir155_prod*(1 - pSTAT3D_n/(pSTAT3D_n + ka164))*(pAKT2 + 6000)*(1.2 - pAKT1/(pAKT1 + 10000))*(NFKB_n + kb164)*AP1_n^2;
  v165: pre_m155 => deg; k165*pre_m155;
  v166: pre_m155 => m155; k166*pre_m155;
  v167: m155 => deg; k167*m155;
  v168: CEBPB => deg; k168*CEBPB;
  v169: $cebpb_prod + m155 + pCREB + EGR2 => CEBPB + m155 + pCREB + EGR2; k169*cebpb_prod*(1.1 - m155/(m155 + ka169))*pCREB^2*(EGR2 + kb169);
  v170: TNFR + TNFa -> TNFa_R; kf170*TNFR*TNFa - kr170*TNFa_R;
  v171: TNFa_R => TNFa_R_lyso; k171*TNFa_R;
  v172: TNFa_R_lyso => deg; k172*TNFa_R_lyso;
  v173: TNFa_R_lyso => deg + TNFR; k173*TNFa_R_lyso;
  v174: TNFR => deg; k174*TNFR;
  v175: TNFa_R + RIP1 => aRIP1 + TNFa_R; k175*TNFa_R*RIP1;
  v176: $rip_prod => RIP1; k176*rip_prod;
  v177: RIP1 => deg; k177*RIP1;
  v178: aRIP1 + A20 => deg + A20; k178*aRIP1*A20/(A20 + ka178);
  v179: aRIP1 => RIP1; k179*aRIP1;
  v180: $tnfr_prod => TNFR; k180*tnfr_prod;
  v181: TAK1 + aRIP1 + aTRAF6 => pTAK1 + aRIP1 + aTRAF6; k181*TAK1*(aRIP1 + aTRAF6*100);
  v182: pTAK1 => TAK1; k182*pTAK1;
  v183: p38 + pTAK1 => pp38 + pTAK1; k183*p38/(p38 + ka183)*pTAK1;
  v184: pp38 => p38; k184*pp38;
  v185: pp38 => pp38_n; k185*pp38;
  v186: JNK + pTAK1 => pJNK + pTAK1; k186*JNK/(JNK + ka186)*pTAK1;
  v187: pJNK => JNK; k187*pJNK;
  v188: pp38_n => p38; k188*pp38_n;
  v189: IKK + pTAK1 => pIKK + pTAK1; k189*IKK*pTAK1^2;
  v190: pIKK => IKK; k190*pIKK;
  v191: $ikk_prod => IKK; k191*ikk_prod;
  v192: IKK + O2_aPHD => deg + O2_aPHD; k192*IKK*O2_aPHD^2;
  v193: pJNK_n => JNK; k193*pJNK_n;
  v194: pJNK => pJNK_n; k185*pJNK;
  v195: ERK + pIKK + aINT1 + aINT2 + pV165a_R1 => pERK + pIKK + aINT1 + aINT2 + pV165a_R1; k195*ERK/(ERK + ka195)*(pIKK + aINT1*5 + aINT2*10 + pV165a_R1*3);
  v196: pERK => pERK_n; k185*pERK;
  v197: pERK_n => ERK; k197*pERK_n;
  v198: pERK => ERK; k198*pERK;
  v199: V165a + VEGFR1 -> V165a_R1; kf199*V165a*VEGFR1 - kr199*V165a_R1;
  v200: V165a_R1 -> pV165a_R1; kf200*V165a_R1 - kr200*pV165a_R1;
  v201: pV165a_R1 => V165_R1_lyso; k201*pV165a_R1;
  v202: V165_R1_lyso => deg; k202*V165_R1_lyso;
  v203: V165_R1_lyso => deg + VEGFR1; k203*V165_R1_lyso;
  v204: $VEGF_prod => V165b; k204*VEGF_prod;
  v205: V165b + VEGFR1 -> V165b_R1; kf205*V165b*VEGFR1 - kr205*V165b_R1;
  v206: V165b_R1 => V165_R1_lyso; k206*V165b_R1;
  v207: $STAT3 + pV165a_R1 -> pV165a_R1_STAT3; kf207*STAT3*pV165a_R1 - kr207*pV165a_R1_STAT3;
  v208: pV165a_R1_STAT3 => pSTAT3 + pV165a_R1; k208*pV165a_R1_STAT3;
  v209: $R1_prod => VEGFR1; k209*R1_prod;
  v210: VEGFR1 => deg; k210*VEGFR1;
  v211: $nfkb_prod => p65; k211*nfkb_prod;
  v212: $nfkb_prod => p50; k212*nfkb_prod;
  v213: p65 => deg; k213*p65;
  v214: p50 => deg; k214*p50;
  v215: p65 + p50 -> NFKB; kf215*p65*p50 - kr215*NFKB;
  v218: NFKB_n + IKB_n -> IKB_NFKB_n; kf216*NFKB_n*IKB_n - kr216*IKB_NFKB_n;
  v217: IKB_NFKB_n => IKB_NFKB; k217*IKB_NFKB_n;
  v216: NFKB + IKB -> IKB_NFKB; kf216*NFKB*IKB - kr216*IKB_NFKB;
  v219: NFKB => NFKB_n; k219*NFKB;
  v220: IKB -> IKB_n; kf220*IKB - kr220*IKB_n;
  v221: $Ikb_prod + NFKB_n => IKB + NFKB_n; k221*Ikb_prod*NFKB_n;
  v222: IKB_NFKB + pIKK => pIKB + NFKB + pIKK; k222*IKB_NFKB*pIKK/(pIKK + ka222);
  v223: pIKB => deg; k223*pIKB;
  v224: NFKB_n + SOCS1 => p50_n + SOCS1; k224*NFKB_n*SOCS1/(SOCS1 + ka224);
  v225: p50_n => p50; k225*p50_n;
  v226: IKB + Mg_f => deg + Mg_f; k226*IKB*F_mg_ikb_d;
  v227: CREB + pp38_n + $pAKT_t => pCREB + pp38_n + $pAKT_t; k227*CREB*(pp38_n + pAKT_t*0.3);
  v228: pCREB + GSK3b => CREB + GSK3b; k228*pCREB*GSK3b;
  v229: AP1_n => deg; k229*AP1_n;
  v230: $ap1_prod + pp38_n + pJNK_n + pERK_n + GSK3b => AP1_n + pp38_n + pJNK_n + pERK_n + GSK3b; k230*ap1_prod*(pp38_n*0.01 + pJNK_n*5 + pERK_n*0.1)*(1.05 - GSK3b/(GSK3b + ka230));
  v231: pIL4_R_JAK + INT1 => aINT1 + pIL4_R_JAK; k231*pIL4_R_JAK*INT1;
  v232: aINT1 => INT1; k232*aINT1;
  v233: $egr2_prod + pSTAT6D_n => EGR2 + pSTAT6D_n; k233*egr2_prod*(pSTAT6D_n/(pSTAT6D_n + ka233));
  v234: EGR2 => deg; k234*EGR2;
  v235: aINT2 => INT2; k235*aINT2;
  v236: INT2 + pIL10_R_JAK => aINT2 + pIL10_R_JAK; k236*INT2*pIL10_R_JAK;
  v237: $a20_prod + CEBPB + NFKB_n => A20 + CEBPB + NFKB_n; k237*a20_prod*CEBPB*NFKB_n;
  v238: A20 => deg; k238*A20;
  v239: $il1b_prod + NFKB_n + AP1_n + aIRF5 + CEBPB + AP1_n + HIF2a_b_n + HIF1a_b_n + pSTAT3D_n + pSTAT6D_n => IL1b + NFKB_n + aIRF5 + CEBPB + AP1_n + HIF1a_b_n + HIF2a_b_n + AP1_n + pSTAT3D_n + pSTAT6D_n; k239*il1b_prod*(NFKB_n*aIRF5*0.00033 + AP1_n*CEBPB*1e-5)/(NFKB_n*aIRF5*0.00033 + AP1_n*CEBPB*1e-5 + 30000)*(0.02 + (HIF1a_b_n*HIF2a_b_n)^2/((HIF1a_b_n*HIF2a_b_n)^2 + ka239))*(1.5 - pSTAT3D_n/(pSTAT3D_n + kb239))*(1.05 - pSTAT6D_n^2/(pSTAT6D_n^2 + kc239));
  v240: $il1r_prod + IRF1 => IL1R + IRF1; k240*il1r_prod*(1 - IRF1/(IRF1 + ka240));
  v241: IL1R => deg; k241*IL1R;
  v242: IL1R + IL1b -> IL1b_R; kf242*IL1R*IL1b - kr242*IL1b_R;
  v243: IL1b_R => IL1b_R_lyso; k243*IL1b_R;
  v244: IL1b_R_lyso => deg; k244*IL1b_R_lyso;
  v245: IL1b_R_lyso => deg + IL1R; k245*IL1b_R_lyso;
  v246: $irak4_prod + m93 => IRAK4 + m93; k246*irak4_prod*(1 - m93/(m93 + ka246));
  v247: IRAK4 => deg; k247*IRAK4;
  v248: IL1b_R + TRAF6 + A20 + SOCS1 + m146b + IRAK4 + pIRAK4 => IL1b_R + aTRAF6 + A20 + SOCS1 + m146b + IRAK4 + pIRAK4; k248*IL1b_R*(IRAK4 + pIRAK4)*TRAF6*(1.01 - A20/(A20 + ka248))*(1 - SOCS1/(SOCS1 + kb248))*(1.2 - m146b/(m146b + kc248));
  v249: aTRAF6 => TRAF6; k249*aTRAF6;
  v250: IL1Ra + IL1R -> IL1Ra_R; kf242*IL1Ra*IL1R - kr242*IL1Ra_R;
  v251: $il1ra_prod + NFKB_n + CEBPB + pSTAT6D_n + pSTAT3D_n => IL1Ra + NFKB_n + CEBPB + pSTAT6D_n + pSTAT3D_n; k251*il1ra_prod*(NFKB_n*CEBPB*0.0001/(NFKB_n*CEBPB*0.0001 + ka251))*(0.1 + pSTAT6D_n/(pSTAT6D_n + kb251))*(pSTAT3D_n/(pSTAT3D_n + kc251));
  v252: IL1Ra => deg; k252*IL1Ra;
  v253: aIRF5 => IRF5; k253*aIRF5;
  v254: IRF5 + pIKK + pIRAK4 + IRF4 => aIRF5 + pIKK + pIRAK4 + IRF4; k254*IRF5*(pIKK*pIRAK4/(pIRAK4*pIKK + ka254))*(1.05 - IRF4/(IRF4 + kb254));
  v255: IRAK4 + IL1b_R => pIRAK4 + IL1b_R; k255*IRAK4*IL1b_R^2;
  v256: pIRAK4 => IRAK4; k256*pIRAK4;
  v257: GSK3b + pAKT1 + pAKT2 => pGSK3b + pAKT1 + pAKT2; k257*GSK3b*(pAKT1 + pAKT2)^2;
  v258: pGSK3b => GSK3b; k258*pGSK3b;
  _J0: $Ikb_prod + pH3S10 => IKB + pH3S10; (F_h3s10_ikb - 1)*(F_h3s10_ikb > 1);
  _J1: $IL8_prod + pH3S10 -> IL8_m + pH3S10; (F_p3s10_il8_p - 1)*(F_p3s10_il8_p > 1);
  _J2: _pPI3K => ; k_ppi3k_d*_pPI3K;
  _J3: AKT1 + _pPI3K -> pAKT1 + _pPI3K; K_ppi3k_a*AKT1*_pPI3K - K_ppi3k_da*pAKT1;
  IL6_v11: $IL6R_JACK + IL6 -> IL6_R_JACK; k_il6r_b*IL6*(IL6 > 0) - k_il6r_ub*IL6_R_JACK*(IL6_R_JACK > 0);
  IL6_v12: IL6_R_JACK -> pIL6_R_JACK; k_il6r_a*IL6_R_JACK*(IL6_R_JACK > 0) - k_il6r_da*pIL6_R_JACK*(pIL6_R_JACK > 0);
  IL6_v13: $STAT3 + pIL6_R_JACK => _pSTAT3 + pIL6_R_JACK; (F_il6_stat3_a - 1)*(F_il6_stat3_a > 1)*STAT3;
  IL6_v14: $PI3K + pIL6_R_JACK => _pPI3K + pIL6_R_JACK; (F_il6_pi3k_a - 1)*(F_il6_pi3k_a > 1)*PI3K;
  IL6_v21: $IL6_prod + NFKB_n + AP1_n + pCREB => IL6_m + NFKB_n + AP1_n + pCREB; k_il6_p + (F_nfkb_il6_p - 1)*(F_nfkb_il6_p > 1) + (F_ap1_il6_p - 1)*(F_ap1_il6_p > 1) + (F_creb_il6_p - 1)*(F_creb_il6_p > 1);
  IL6_v22: IL6_m => IL6; k_il6m_il6*IL6_m*(IL6_m > 0);
  IL6_v23: IL6 => ; k_il6_d*IL6;
  IL6_v24: IL6_m => ; k_il6m_d*IL6_m;
  IL8_v11: $IL8_prod + NFKB_n + AP1_n => IL8_m + NFKB_n + AP1_n; k_il8_p + (F_nfkb_il8_p - 1)*(F_nfkb_il8_p > 1) + (F_ap1_il8_p - 1)*(F_ap1_il8_p > 1);
  IL8_v12: IL8_m => IL8; k_il8m_il8*IL8_m*(IL8_m > 0);
  IL8_v13: IL8 => ; k_il8_d*IL8;
  IL8_v14: IL8_m => ; k_il8m_d*IL8_m;
  IL8_v21: $IL8R + IL8 => IL8_R; k_il8r_b*IL8*(IL8 > 0) - k_il8r_ub*IL8_R*(IL8_R > 0);
  IL8_v22: IL8_R => pIL8_R; k_il8r_a*IL8_R*(IL8_R > 0) - k_il8r_da*pIL8_R*(pIL8_R > 0);
  IL8_v23: $irak4_prod + pIL8_R => IRAK4 + pIL8_R; (F_il8_irak_p - 1)*(F_il8_irak_p > 1);
  IL8_24: $RHO + pIL8_R => aRHO + pIL8_R; k_rho_a*pIL8_R/(pIL8_R + kd_rho_a);
  IL8_25: aRHO => $RHO; k_rho_da*aRHO;
  IL8_26: IKB_NFKB + aRHO => NFKB + IKB + aRHO; (F_rho_nfkb_a - 1)*(F_rho_nfkb_a > 1)*IKB_NFKB;
  IL8_27: $PI3K + aRHO => _pPI3K + aRHO; (F_rho_pi3k_a - 1)*(F_rho_pi3k_a > 1)*PI3K;
  IL8_28: $STAT3 + aRHO => _pSTAT3 + aRHO; (F_rho_stat3_a - 1)*(F_rho_stat3_a > 1)*STAT3;

  // Events:
  M1__E0: at (time > 0): Mg_f_0 = Mg_f;
  M1__E1: at (time > 1): pH3S10_0 = pH3S10;
  M1__E2: at (time > 0): M1_Mg_0 = Mg_f + Mg_ATP + Mg_IM;
  M1__E3: at (time > 0): Mg_f_0 = Mg_f;
  M1__E4: at (time > 0): M1_Mg_IM_0 = Mg_IM;
  M1__E5: at (time > 0): M1_TRPM_0 = M1_TRPM;
  M1__E6: at (time > 0): Mg_ATP_0 = Mg_ATP;
  M1__E7: at (time > 0): M1_TRPM_n_0 = M1_TRPM_n;
  M1__E8: at (time > 0): M1_M7CK_n_0 = M1_M7CK_n;
  M1__E9: at (time > 0): M1_Mg_e_0 = Mg_e;
  M1__E10: at (time > 0): M1_ATP_0 = ATP;
  _E0: at (time > 0): IFNGR_0 = IFNGR;
  _E1: at (time > 0): IL4R_0 = IL4R;
  _E2: at (time > 0): IL8_m_0 = IL8_m;
  _E3: at (time > 0): IL8_0 = IL8;
  _E4: at (time > 0): aTRAF6_0 = aTRAF6;
  _E5: at (time > 0): pIL8_R_0 = pIL8_R;
  _E6: at (time > 0): IL6_m_0 = IL6_m;
  _E7: at (time > 0): IL6_0 = IL6;
  _E8: at (time > 0): _pSTAT3_0 = _pSTAT3;
  _E9: at (time > 0): pIL6_R_JACK_0 = pIL6_R_JACK;
  _E10: at (time > 0): _pPI3K_0 = _pPI3K;
end
